// SBML level 2 version 1

model fibroblast()

  // Compartments:
  compartment default = 1;

  // Species:
  species Clot in default = 0;
  species Collagen in default = 0;
  species PDGF in default = 0;
  species IL1 in default = 0;
  species TGFa in default = 0;
  species EGF in default = 0;
  species TGFb1 in default = 0;
  species TGFb3 in default = 0;
  species FGF2 in default = 0;
  species MMP in default = 0;
  species TNFa in default = 0;
  species KGF in default = 0;
  species Procollagen in default = 0;

  // Parameters:
  ks_clot = 0;
  ks_collagen = 0;
  ks_pdgf = 0;
  ks_il1 = 0;
  ks_tgfa = 0;
  ks_egf = 0;
  ks_tgfb1 = 0;
  ks_tgfb3 = 0;
  ks_fgf2 = 0;
  ks_mmp = 0;
  ks_tnfa = 0;
  ks_kgf = 0;
  kpc_proc_coll = 0.1;
  kd_clot = 0;
  kd0_collagen = 1e-9;
  kd1_collagen_mmp = 1e-4;
  kd_pdgf = 1.668e-3;
  kd_il1 = 1.152e-2;
  kd_tgfa = 1e-3;
  kd_egf = 1e-3;
  kd_tgfb1 = 2.458e-4;
  kd_tgfb3 = 2.458e-4;
  kd_fgf2 = 1e-3;
  kd_mmp = 1e-3;
  kd_tnfa = 1e-3;
  kd_kgf = 1e-3;

  // Assignment rules:
  kd_collagen := kd0_collagen*(1 + kd1_collagen_mmp*MMP);

  // Reactions:
  SynCol1: Procollagen => Collagen; default*kpc_proc_coll*Procollagen;
  DegClot: Clot => ; default*kd_clot*Clot;
  DegCol: Collagen => ; default*kd_collagen*Collagen;
  DegPDGF: PDGF => ; default*kd_pdgf*PDGF;
  DegIL1: IL1 => ; default*kd_il1*IL1;
  DegTGFa: TGFa => ; default*kd_tgfa*TGFa;
  DegEGF: EGF => ; default*kd_egf*EGF;
  DegTGFb1: TGFb1 => ; default*kd_tgfb1*TGFb1;
  DegTGFb3: TGFb3 => ; default*kd_tgfb3*TGFb3;
  DegFGF2: FGF2 => ; default*kd_fgf2*FGF2;
  DegMMP: MMP => ; default*kd_mmp*MMP;
  DegTNFa: TNFa => ; default*kd_tnfa*TNFa;
  DegKGF: KGF => ; default*kd_kgf*KGF;
end
