// SBML level 2 version 4

model clot()

  // Compartments:
  compartment default = 1;

  // Species:
  species WoundSignal in default = 0;
  species Clot in default = 0;
  species Collagen in default = 0;
  species PDGF in default = 0;
  species KGF in default = 0;
  species IL1 in default = 0;
  species TGFb1 in default = 0;
  species Procollagen in default = 0;
  species MMP in default = 0;

  // Parameters:
  KS_PDGF = 0.005;
  KPC_PROC2COL = 1;
  KD_PDGF = 1.667e-3;
  KD_IL1 = 1e-3;
  KD_KGF = 4.998e-3;
  KD_TGFb1 = 2.458e-4;

  // Reactions:
  SynPDGF: => PDGF; default*KS_PDGF*Clot;
  SynCol1: Procollagen => Collagen; default*KPC_PROC2COL*Procollagen;
  DegPDGF: PDGF => ; default*KD_PDGF*PDGF;
  DegIL1: IL1 => ; default*KD_IL1*IL1;
  DegTGFb1: TGFb1 => ; default*KD_TGFb1*TGFb1;
  DegKGF: KGF => ; default*KD_KGF*KGF;
end
