// SBML level 2 version 1

model fibroblast()

  // Compartments:
  compartment default = 1;

  // Species:
  species WoundSignal in default = 0;
  species Clot in default = 0;
  species Collagen in default = 0;
  species PDGF in default = 0;
  species KGF in default = 0;
  species IL1 in default = 0;
  species TGFb1 in default = 0;
  species Procollagen in default = 0;
  species MMP in default = 0;

  // Parameters:
  KSMAX_PROCOL = 3;
  N_PROCOL = 1;
  KD_TGFb1_PROCOL = 100;
  KSMAX_KGF = 8;
  N_KGF = 1;
  KD_PDGF_KGF = 50;
  KSMAX_TGFb1 = 100;
  N_TGFb1 = 1;
  KD_PDGF_TGFb1 = 50;
  KD_IL1_TGFb1 = 50;
  KD_PDGF = 1.668e-2;
  KD_IL1 = 1e-2;
  KD_TGFb1 = 2.458e-4;
  Prob_DoNothing = 1;
  Prob_Apoptosis = 0.001;
  n_GrowthDiv = 2;
  Pmax_GrowthDiv = 0.05;
  KD_PDGF_GD = 100;
  n_Migration = 3;
  Pmax_Migration = 1;
  KD_PDGF_MG = 10000;

  // Assignment rules:
  Prob_GrowthDiv := 0.01 + Pmax_GrowthDiv*(PDGF^n_GrowthDiv/(KD_PDGF_GD + PDGF^n_GrowthDiv));
  Prob_Migration := 0.01 + Pmax_Migration*(PDGF^n_Migration/(KD_PDGF_MG + PDGF^n_Migration));
  KS_PROCOLLAGEN := KSMAX_PROCOL*(TGFb1^N_PROCOL/(KD_TGFb1_PROCOL + TGFb1^N_PROCOL));
  KS_TGFb1 := KSMAX_TGFb1*(PDGF^N_TGFb1/((KD_PDGF_TGFb1 + PDGF^N_TGFb1)*(KD_IL1_TGFb1 + IL1^N_TGFb1)));
  KS_KGF := KSMAX_KGF*(PDGF^N_KGF/(KD_PDGF_KGF + PDGF^N_KGF));

  // Reactions:
  SynCol: => Procollagen; default*KS_PROCOLLAGEN;
  SynTGFb1: => TGFb1; default*KS_TGFb1;
  SynKGF: => KGF; default*KS_KGF;
  DegPDGF: PDGF => ; default*KD_PDGF*PDGF;
  DegIL1: IL1 => ; default*KD_IL1*IL1;
  DegTGFb1: TGFb1 => ; default*KD_TGFb1*TGFb1;
end
