// SBML level 2 version 1

model keratinocyte()

  // Compartments:
  compartment default = 1;

  // Species:
  species WoundSignal in default = 0;
  species Clot in default = 0;
  species Collagen in default = 0;
  species PDGF in default = 0;
  species KGF in default = 0;
  species IL1 in default = 0;
  species TGFb1 in default = 0;
  species Procollagen in default = 0;
  species MMP in default = 0;

  // Parameters:
  KSMAX_IL1 = 0.5;
  N_IL1 = 1;
  KD_KGF_IL1 = 1;
  KD_KGF = 4.998e-2;
  KD_IL1 = 1e-3;
  n_MigForce = 1;
  Max_MigForce = 1;
  KD_KGF_MF = 100;
  Prob_DoNothing = 1;
  Prob_Apoptosis = 0.001;
  n_GrowthDiv = 1;
  Pmax_GrowthDiv = 0.1;
  KD_KGF_GD = 100;
  n_Migration = 1;
  Pmax_Migration = 40;
  KD_KGF_MG = 100;

  // Assignment rules:
  MigForce := 1 + Max_MigForce*(KGF^n_MigForce/(KD_KGF_MF + KGF^n_MigForce));
  Prob_GrowthDiv := 0.001 + Pmax_GrowthDiv*(KGF^n_GrowthDiv/(KD_KGF_GD + KGF^n_GrowthDiv));
  Prob_Migration := 0.01 + Pmax_Migration*(KGF^n_Migration/(KD_KGF_MG + KGF^n_Migration));
  KS_IL1 := KSMAX_IL1*(KGF^N_IL1/(KD_KGF_IL1 + KGF^N_IL1));

  // Reactions:
  SynIL1: => IL1; default*KS_IL1;
  DegKGF: KGF => ; default*KD_KGF*KGF;
  DegIL1: IL1 => ; default*KD_IL1*IL1;
end
