// SBML level 2 version 1

model macrophage()

  // Compartments:
  compartment default = 1;

  // Species:
  species WoundSignal in default = 0;
  species Clot in default = 0;
  species Collagen in default = 0;
  species PDGF in default = 0;
  species KGF in default = 0;
  species IL1 in default = 0;
  species TGFb1 in default = 0;
  species Procollagen in default = 0;
  species MMP in default = 0;

  // Parameters:
  ksmax_PDGF = 8;
  KD_WS_PDGF = 50;
  n_PDGF = 3;
  ksmax_TGFb1 = 0.5;
  ks0_TGFb1 = 0;
  KD_PDGF_TGFb1 = 50;
  n_TGFb1 = 1;
  ks_egf = 0;
  ks_kgf = 0;
  kd_IL1 = 1e-3;
  kd_woundsignal = 5e-5;
  kd_kgf = 4.998e-3;
  kd_pdgf = 1.668e-3;
  kd_tgfb1 = 2.458e-4;
  kd_mmp = 1e-3;
  Prob_DoNothing = 1;
  Prob_GrowthDiv = 0;
  Prob_Migration = 0;
  mapoptosis0 = 0.01;
  mapoptosis_1 = 0.005;
  mapoptosis_2 = 1;
  mapoptosis_3 = 1;

  // Assignment rules:
  Prob_Apoptosis := mapoptosis0*mapoptosis_1*(1 + mapoptosis_2)*(1 + mapoptosis_3*TGFb1);

  // Reactions:
  SynPDGF: => PDGF; ksmax_PDGF*WoundSignal^n_PDGF/(KD_WS_PDGF + WoundSignal^n_PDGF);
  SynTGFb1: => TGFb1; ks0_TGFb1 + ksmax_TGFb1*PDGF^n_TGFb1/(KD_PDGF_TGFb1 + PDGF^n_TGFb1);
  DegWS: WoundSignal => ; default*kd_woundsignal*WoundSignal;
  DegPDGF: PDGF => ; default*kd_pdgf*PDGF;
  DegIL1: IL1 => ; default*kd_IL1*IL1;
  DegTGFb1: TGFb1 => ; default*kd_tgfb1*TGFb1;
  DegKGF: KGF => ; default*kd_kgf*KGF;
end
